P_2 := 7.25*10^6
P_а := 0.02*10^6
# 3. Построение газодинамического тракта
I_уп := 3609.98
P_п := 700
F`_кр := 0.0002523
F`_а := 0.0099085
m_р := P_п*10^3/I_уп = 193.907
φ_с := 0.98
F_кр := F`_кр*m_р = 0.0489227
φ_β := 0.98
F_крд := F_кр/φ_с = 0.0499211
φ := φ_с*φ_β = 0.9604
F_а := F`_а*m_р = 1.92133
F_ад := F_а/φ_с^2 = 2.00055
L_пр := 1.5
V_кс := L_пр*F_крд = 0.0748817
d_кс := round(nthroot(4*V_кс/π, 3), 3) = 0.457
L_кс := d_кс = 0.457
R_кр := round(sqrt(F_крд/π), 3) = 0.126
D_кр := 2*R_кр = 0.252
R_а := round(sqrt(F_ад/π), 4) = 0.798
R_а*2 = 1.596
R_с1 := 0.25*d_кс = 0.11425
R_с2 := 0.7*D_кр = 0.1764
R_с3 := 0.45*R_кр = 0.0567
R_а/R_кр = 6.33333
L_a := 15.5*R_кр = 1.953
# 5. Расчет смесительной головки
ρ_о := 1135
ρ_г := 424
υ := 3.5504
m_р = 193.907
m_др := m_р/φ = 201.902
m_дг := m_др/(1 + υ) = 44.3702
m_до := υ*m_др/(1 + υ) = 157.532
m_дг + m_до = 201.902
# 5.2 Расчет струйных форсунок для пристеночного слоя.
d_кс = 0.457
ρ_г = 424
m_дг = 44.3702
Δp_фг := 2*10^6
n_сф := π*(d_кс - 0.016)/0.015 = 92.3628
μ_ф := 0.65
m_сфг := 0.05*m_дг/n_сф = 0.0240195
F_сфг := m_сфг/(μ_ф*sqrt(2*Δp_фг*ρ_г)) = 8.97301e-7
ω_г := μ_ф*sqrt(2*Δp_фг/ρ_г) = 63.1336
d_сфг := round(sqrt(4*F_сфг/π), 4) = 0.0011
# 5.3 Расчет центробежных форсунок
# 5.3.1. Форсунки горючего
n_цфг := 187
m_цфг := 0.95*m_дг/n_цфг = 0.22541
Δp_ф := 2*10^6
μ_ф := 0.42
F_сг := m_цфг/(μ_ф*sqrt(2*Δp_ф*ρ_г)) = 1.3032e-5
A := 1
d_сг := round(sqrt(4*F_сг/π), 3) = 0.004
r_сг := d_сг/2 = 0.002
i := 2
R_вх := 1.1*r_сг = 0.0022
m_вх := m_цфг/i = 0.112705
Динамическая
r_вх := round(sqrt(R_вх*r_сг/(i*A)), 4) = 0.0015
вязкость
d_вх := 2*r_вх = 0.003
η := 102.8*10^-6
Re_вх := 4*m_цфг/(η*π*d_вх*sqrt(i)) = 658043
Для_правильной_работы_маткада
lg(λ) := 25.8/log(Re_вх)^2.58 - 2 = -1.72556
λ := 0
λ := 10^lg(λ) = 0.0188124
log(0.02) = -1.69897
A_э := R_вх*r_сг/(i*r_вх^2 + λ/2*R_вх*(R_вх - r_сг)) = 0.976879
|(A - A_э)/A|*100 = 2.31207
l_вх := 1.1*d_вх = 0.0033
l_сг := 0.5*d_сг = 0.002
h := R_вх = 0.0022
R_з := R_вх + r_вх = 0.0037
R_фг := round(sqrt(R_з^2 + l_вх^2 + 2*l_вх*sqrt(R_з^2 - R_вх^2)), 4) = 0.0066
δ := R_фг - R_з = 0.0029
# 5.3.2. Форсунки окислителя
n_цфо := 424
m_цфо := m_до/n_цфо = 0.371538
m_цфо = 0.371538
ρ_о = 1135
Δp_ф := 2*10^6
μ_ф := 0.42
F_со := m_цфо/(μ_ф*sqrt(2*Δp_ф*ρ_о)) = 1.31288e-5
A := 1
d_со := round(sqrt(4*F_со/π), 3) = 0.004
r_со := d_со/2 = 0.002
i := 3
R_вх := 1.1*r_со = 0.0022
m_вх := m_цфо/i = 0.123846
Динамическая
r_вх := round(sqrt(R_вх*r_со/(i*A)), 4) = 0.0012
вязкость
d_вх := 2*r_вх = 0.0024
η := 190*10^-6
Re_вх := 4*m_цфо/(η*π*d_вх*sqrt(i)) = 598946
Для_правильной_работы_маткада
lg(λ) := 25.8/log(Re_вх)^2.58 - 2 = -1.72052
λ := 0
λ := 10^lg(λ) = 0.0190319
A_э := R_вх*r_со/(i*r_вх^2 + λ/2*R_вх*(R_вх - r_со)) = 1.01753
|(A - A_э)/A|*100 = 1.75323
l_вх := 1.1*d_вх = 0.00264
l_со := 0.5*d_со = 0.002
h := R_вх = 0.0022
R_з := R_вх + r_вх = 0.0034
R_фо := round(sqrt(R_з^2 + l_вх^2 + 2*l_вх*sqrt(R_з^2 - R_вх^2)), 4) = 0.0057
δ := R_фо - R_з = 0.0023
# 5.4 Проверка радиусов форсунок
R_фо + R_фг = 12.3*10^-3  # м
# 6. Расчет турбонасосного агрегата
ΔP_охл := 2*10^6
P_2 = 7250000
ΔP_ф := 2*10^6
P_выхг := P_2 + ΔP_охл + ΔP_ф = 11250000
P_выхо := P_2 + ΔP_ф = 9250000
P_нд := 0.5*10^6
P_вх := 0.5*10^6
P_sг := 10^5
P_sо := 10^5
# 6.1 Расчет насосов
Q_г := m_дг/ρ_г = 0.104647
H_г := (P_выхг - P_вх)/ρ_г = 25353.8
c_кр := 4000
ω_maxг := c_кр*((P_вх - P_sг)/ρ_г)^(3/4)/(298*sqrt(Q_г)) = 7063.2
Q_о := m_до/ρ_о = 0.138795
H_о := (P_выхо - P_вх)/ρ_о = 7709.25
c_кр := 4000
ω_maxо := c_кр*((P_вх - P_sо)/ρ_о)^(3/4)/(298*sqrt(Q_о)) = 2930.59
ω_о := 0.95*ω_maxо = 2784.06
ω_г := 0.95*ω_maxг = 6710.04
ω_min := ω_о
ω := ω_min = 2784.06
n_sг := 193.3*ω*sqrt(Q_г)/H_г^(3/4) = 86.6446
n_sо := 193.3*ω*sqrt(Q_о)/H_о^(3/4) = 243.69
η_о := 0.9
η_г := 0.7
η_м := 0.85
η_н := η_о*η_г*η_м = 0.5355
N_нг := Q_г*H_г*ρ_г/η_н = 2100751
M_кр1 := N_нг/ω = 754.563
N_но := Q_о*H_о*ρ_о/η_н = 2267888
M_кр2 := N_но/ω = 814.597
M_кр := M_кр1 + M_кр2 = 1569.16
τ := 9.4*10^8
d_в := round(nthroot(5.1*M_кр/τ, 3), 3) = 0.02
d_вт := 1.2*d_в = 0.024
# 6.2. Расчет насоса горючего
Q_од := Q_г/η_о = 0.116274
k_о := 5
D_1э := round(0.47*k_о*nthroot(Q_од/ω, 3), 3) = 0.082
D_о := round(sqrt(D_1э^2 + d_вт^2), 3) = 0.085
D_1 := D_о = 0.085
c_о := Q_од/(π/4*D_1э^2) = 22.0174
b_1 := round(0.375*D_1э^2/D_1, 3) = 0.03
u_1 := D_1*ω/2 = 118.323
ψ_1 := 0.85
Здесь_надо_варировать  # ψ_1
δ_1 := 0.003
чтобы_была_близка_к_конечной
z := 6
c_1m := Q_од/(π*D_1*b_1*ψ_1) = 17.0755
β_1 := atan(c_1m/u_1) = 0.143324
β_1 = 8.21185°
Δβ_л := 12° = 0.20944
β_1л := β_1 + Δβ_л = 20.2118°
β_1л = 0.352763
ψ_1 := 1 - δ_1*z/(π*D_1*sin(β_1л)) = 0.804896
c_1m := Q_од/(π*D_1*b_1*ψ_1) = 18.0324
β_1 := atan(c_1m/u_1) = 0.151236
β_1 = 8.66521°
Δβ_л := 12° = 0.20944
β_1л := β_1 + Δβ_л = 0.360676
β_1л = 20.6652°
H_т := H_г/η_г = 36219.7
k_н := 0.5
u_2 := sqrt(H_т/k_н) = 269.146
D_2' := round(2*u_2/ω, 3) = 0.193
β_2 := 60°
z := 6.5*(D_2' + D_1)/(D_2' - D_1)*sin((β_1л + β_2)/2) = 10.829
z := ceil(z) = 11
c_2m := c_1m
ψ_2 := 1 - δ_1*z/(π*D_2'*sin(β_2)) = 0.937154
b_2 := round(Q_од/(π*D_2'*c_2m*ψ_2), 3) = 0.011
ψ := 0.55 + 0.6*sin(β_2) = 1.06962
p := 2*ψ/z*1/(1 - (D_1/D_2')^2) = 0.241274
H_T∞ := H_т*(1 + p) = 44958.6
u_2 := c_2m/(2*tan(β_2)) + sqrt((c_2m/(2*tan(β_2)))^2 + H_T∞) = 217.304
D_21' := round(2*u_2/ω, 3) = 0.156
γ := round(|(D_21' - D_2')/D_21'|*100, 1) = 23.7
z := 6.5*(D_21' + D_1)/(D_21' - D_1)*sin((β_1л + β_2)/2) = 14.2799
z := ceil(z) = 15
ψ_2 := 1 - δ_1*z/(π*D_21'*sin(β_2)) = 0.893975
b_2 := round(Q_од/(π*D_21'*c_2m*ψ_2), 3) = 0.015
ψ := 0.55 + 0.6*sin(β_2) = 1.06962
p := 2*ψ/z*1/(1 - (D_1/D_21')^2) = 0.202834
H_T∞ := H_т*(1 + p) = 43566.2
u_2 := c_2m/(2*tan(β_2)) + sqrt((c_2m/(2*tan(β_2)))^2 + H_T∞) = 213.996
D_22' := round(2*u_2/ω, 3) = 0.154
γ := round(|(D_22' - D_21')/D_22'|*100, 1) = 1.3
# 6.3 Расчет насоса окислителя
Q_од := Q_о/η_о = 0.154216
k_о := 5
D_1э := round(0.47*k_о*nthroot(Q_од/ω, 3), 3) = 0.09
D_о := round(sqrt(D_1э^2 + d_вт^2), 3) = 0.093
D_1 := D_о = 0.093
c_о := Q_од/(π/4*D_1э^2) = 24.2413
b_1 := round(0.375*D_1э^2/D_1, 3) = 0.033
u_1 := D_1*ω/2 = 129.459
ψ_1 := 0.85
Здесь_надо_варировать  # ψ_1
δ_1 := 0.003
чтобы_была_близка_к_конечной
z := 6
c_1m := Q_од/(π*D_1*b_1*ψ_1) = 18.8176
β_1 := atan(c_1m/u_1) = 0.144345
β_1 = 8.27036°
Δβ_л := 9° = 0.15708
β_1л := β_1 + Δβ_л = 17.2704°
β_1л = 0.301425
ψ_1 := 1 - δ_1*z/(π*D_1*sin(β_1л)) = 0.792481
c_1m := Q_од/(π*D_1*b_1*ψ_1) = 20.1834
β_1 := atan(c_1m/u_1) = 0.154661
β_1 = 8.86142°
Δβ_л := 9° = 0.15708
β_1л := β_1 + Δβ_л = 0.311741
β_1л = 17.8614°
k_н := 0.5
H_т := H_о/η_г = 11013.2
u_2 := sqrt(H_т/k_н) = 148.413
D_2' := round(2*u_2/ω, 3) = 0.107
β_2 := 15°
z := 6.5*(D_2' + D_1)/(D_2' - D_1)*sin((β_1л + β_2)/2) = 26.2652
z := ceil(z) = 27
c_2m := c_1m
ψ_2 := 1 - δ_1*z/(π*D_2'*sin(β_2)) = 0.0689883
b_2 := round(Q_од/(π*D_2'*c_2m*ψ_2), 3) = 0.329
ψ := 0.55 + 0.6*sin(β_2) = 0.705291
p := 2*ψ/z*1/(1 - (D_1/D_2')^2) = 0.213621
H_T∞ := H_т*(1 + p) = 13365.9
u_2 := c_2m/(2*tan(β_2)) + sqrt((c_2m/(2*tan(β_2)))^2 + H_T∞) = 159.254
D_21' := round(2*u_2/ω, 3) = 0.114
γ := round(|(D_21' - D_2')/D_21'|*100, 1) = 6.1
z := 6.5*(D_21' + D_1)/(D_21' - D_1)*sin((β_1л + β_2)/2) = 18.123
z := ceil(z) = 19
ψ_2 := 1 - δ_1*z/(π*D_21'*sin(β_2)) = 0.385073
b_2 := round(Q_од/(π*D_21'*c_2m*ψ_2), 3) = 0.055
ψ := 0.55 + 0.6*sin(β_2) = 0.705291
p := 2*ψ/z*1/(1 - (D_1/D_21')^2) = 0.221955
H_T∞ := H_т*(1 + p) = 13457.7
u_2 := c_2m/(2*tan(β_2)) + sqrt((c_2m/(2*tan(β_2)))^2 + H_T∞) = 159.631
D_22' := round(2*u_2/ω, 3) = 0.115
γ := round(|(D_22' - D_21')/D_22'|*100, 1) = 0.9
# 7. ЖГГ, Турбина ТНА
N_нг = 2100751
N_но = 2267888
N_т := N_нг + N_но = 4368639
Т_гг := 1200.02
p_вхд := 7.25*10^6
p_вых := 0.2*10^6
R := 624.036
γ := 1.14698
L_ад := γ/(γ - 1)*R*Т_гг*(1 - (p_вых/p_вхд)^(γ/(γ - 1))) = 5843805
c_ад := sqrt(2*L_ад) = 3418.71
u := 0.15*c_ад = 512.807
ω = 2784.06
r := round(u/ω, 3) = 0.184
d := 2*r = 0.368
η_i := 0.4
η_м = 0.85
η_т := η_i*η_м = 0.34
m_гг := N_т/(L_ад*η_т) = 2.19873
ν_гг := 0.7584
m_огг := ν_гг*m_гг/(1 + ν_гг) = 0.948314
m_ггг := 1*m_гг/(1 + ν_гг) = 1.25041
m_огг + m_ггг = 2.19873
# 8. Построение высотной и дроссельной характеристик ЖРД
β := 1828.92
P_п = 700
P_2 = 7250000
K_п := P_п*10^3/(F_крд*P_2) = 1.93409
P_н := 0.10132
P_з(m) := K_п*β*m - F_ад*P_н*10^6
K_п*β = 3537.29
F_ад*P_н*10^6 = 202696
P_пп(m) := K_п*β*m
m_р = 193.907
m_min := 0.18*P_н*10^6*F_кр*P_2/(β*P_а) = 176.844
# Дроссельная характеристика
# [plot: P_з(m), P_пп(m) vs m]
# P | -P_з(m)  -P_пп(m)
m
# [Excel component]
    H := excel["A2:A31"]
    p := excel["B2:B31"]
P_п = 700
F_ад = 2.00055
P := P_п*10^3 - p*F_ад
max(P) = 700000
# [plot: P vs H]
P
H
